# OpenSim document version 40600
# Example: MarkerSet used for scaling or adjusting marker placements
# in OpenSim (ScaleMarkerSet.xml).
# Markers in the model.
MarkerSet:
  Marker R.Shoulder: torso (0 0.42 0.118104)
  Marker L.Shoulder: torso (0 0.42 -0.142)
  Marker V.Sacral: pelvis (-0.154 0.025 0)
  Marker L.PSIS: pelvis (-0.154 0.025 -0.04999999)
  Marker R.Hip: femur_r (0 0 0)
  Marker L.Hip: femur_l (0 0 0)
  Marker R.Knee.Lateral: femur_r (0.008 -0.4 0.055)
  Marker R.Thigh.Front: femur_r (0.011 -0.2 0.06999998)
  Marker R.Shank.Front: tibia_r (0 -0.23 0.05)
  Marker R.Ankle.Lateral: tibia_r (-0.01743173 -0.3850714 0.04727037)
  Marker R.Toe: calcn_r (0.186844 0.00836653 0.00526621)
  Marker R.Heel: calcn_r (-0.0321615 0.01491079 -0.0111695)
  Marker L.Knee.Lateral: femur_l (0.008 -0.4 -0.055)
  Marker L.Thigh.Front: femur_l (0.011 -0.2 -0.07)
  Marker L.Ankle.Lateral: tibia_l (-0.017 -0.385 -0.047)
  Marker L.Shank.Front: tibia_l (0 -0.23 -0.05)
  Marker L.Toe: calcn_l (0.186844 0.00836653 -0.005)
  Marker L.Heel: calcn_l (-0.03 0.01459576 0.01)
  Marker R.Iliac.Crest: pelvis (0.028 0.01 0.128)
  Marker L.Iliac.Crest: pelvis (0.028 0.01 -0.128)
