# OpenSim document version 40600
# Example: MarkerSet used for scaling or adjusting marker placements
# in OpenSim (ScaleMarkerSet.xml).
# Markers in the model.
MarkerSet:
  Marker Spine4_: torso (-0.04398568 0.4134315 0)
  Marker Spine_: pelvis (-0.142 0.04758538 0.0003063681) fixed=true
  Marker RightArm_: torso (0 0.3999996 0.142)
  Marker LeftArm_: torso (0 0.3999996 -0.142)
  Marker RASI: pelvis (0.01 0.01 0.128)
  Marker LASI: pelvis (0.01 0.009999998 -0.1256827)
  Marker RIPS: pelvis (-0.15 0.03999999 0.05)
  Marker LIPS: pelvis (-0.15 0.03999999 -0.05)
  Marker RightUpLeg_: femur_r (0 0 0) fixed=true
  Marker LeftUpLeg_: femur_l (0 0 0) fixed=true
  Marker RTHI: femur_r (0 -0.2 0.05)
  Marker Knee_Lateral_r: femur_r (0.008 -0.404 0.055)
  Marker RightLeg_: femur_r (0.007442795 -0.4016722 0) fixed=true
  Marker RTIB: tibia_r (0 -0.15 0.05)
  Marker Ankle_Lateral_r: tibia_r (-0.03 -0.3850714 0.04727038)
  Marker RTOE: calcn_r (0.186844 0.00836653 0.00526621)
  Marker RHEE: calcn_r (-0.0321615 0.02 -0.0111695)
  Marker LTHI: femur_l (0 -0.2 -0.05)
  Marker Knee_Lateral_l: femur_l (0.008 -0.404 -0.055)
  Marker LeftLeg_: femur_l (0.011 -0.401 0) fixed=true
  Marker Ankle_Lateral_l: tibia_l (-0.03 -0.385 -0.047)
  Marker LTIB: tibia_l (0 -0.21 -0.05)
  Marker LTOE: calcn_l (0.186844 0.00836653 -0.005)
  Marker LHEE: calcn_l (-0.03 0.02 0.009999985)
