# OpenSim document version 40500
ScaleTool HSS_Rajagopal2015_passiveCal_hipAbdMoved-scaled:
  mass: 75.337 [kg]
  height: -1
  age: -1
  ModelScaler:
    apply: true
    marker_file: HSS_squat1.trc
    time_range: 0 0.2
    preserve_mass_distribution: true
  MarkerPlacer:
    apply: true
    marker_file: HSS_squat1.trc
    time_range: 0 0.2
    max_marker_movement: -1
    IKTaskSet:
      IKMarkerTask C7: apply=false weight=1
      IKMarkerTask R.Shoulder: apply=true weight=1
      IKMarkerTask L.Shoulder: apply=true weight=1
      IKMarkerTask V.Sacral: apply=true weight=1
      IKMarkerTask L.PSIS: apply=true weight=1
      IKMarkerTask R.Hip: apply=true weight=1
      IKMarkerTask L.Hip: apply=true weight=1
      IKMarkerTask R.Knee.Lateral: apply=true weight=1
      IKMarkerTask R.Thigh.Front: apply=true weight=1
      IKMarkerTask R.Shank.Front: apply=true weight=1
      IKMarkerTask R.Ankle.Lateral: apply=true weight=1
      IKMarkerTask R.Toe: apply=true weight=1
      IKMarkerTask R.Heel: apply=true weight=1
      IKMarkerTask L.Knee.Lateral: apply=true weight=1
      IKMarkerTask L.Thigh.Front: apply=true weight=1
      IKMarkerTask L.Ankle.Lateral: apply=true weight=1
      IKMarkerTask L.Shank.Front: apply=true weight=1
      IKMarkerTask L.Toe: apply=true weight=1
      IKMarkerTask L.Heel: apply=true weight=1
      IKMarkerTask L.Ankle.Center: apply=true weight=1
      IKMarkerTask L.Knee.Center: apply=true weight=1
      IKMarkerTask R.Ankle.Center: apply=true weight=1
      IKMarkerTask R.Knee.Center: apply=true weight=1
