# OpenSim document version 40500
ScaleTool subject01:
  mass: 75.337 [kg]
  height: -1
  age: -1
  GenericModelMaker:
    model_file: Rajagopal2015_passiveCal_hipAbdMoved_no_markers.osim
    marker_set_file: Dari_Scale_Marker_Set_v0.1.xml
  ModelScaler:
    apply: true
    marker_file: Captury_Subj1_squat02.trc
    time_range: 0.1 0.2
    preserve_mass_distribution: false
  MarkerPlacer:
    apply: true
    marker_file: Captury_Subj1_squat02.trc
    time_range: 0.1 0.2
    output_motion_file: subject01_static_output.mot
    output_model_file: subject01_simbody.osim
    max_marker_movement: -1
    IKTaskSet:
      IKMarkerTask Spine4_: apply=true weight=1
      IKMarkerTask Spine_: apply=true weight=1
      IKMarkerTask RightArm_: apply=true weight=1
      IKMarkerTask LeftArm_: apply=true weight=1
      IKMarkerTask RASI: apply=true weight=1
      IKMarkerTask LASI: apply=true weight=1
      IKMarkerTask RIPS: apply=true weight=1
      IKMarkerTask LIPS: apply=true weight=1
      IKMarkerTask RightUpLeg_: apply=true weight=1
      IKMarkerTask LeftUpLeg_: apply=true weight=1
      IKMarkerTask RTHI: apply=true weight=1
      IKMarkerTask Knee_Lateral_r: apply=true weight=1
      IKMarkerTask RightLeg_: apply=true weight=1
      IKMarkerTask RTIB: apply=true weight=1
      IKMarkerTask Ankle_Lateral_r: apply=true weight=1
      IKMarkerTask RTOE: apply=true weight=1
      IKMarkerTask RHEE: apply=true weight=1
      IKMarkerTask LTHI: apply=true weight=1
      IKMarkerTask Knee_Lateral_l: apply=true weight=1
      IKMarkerTask LeftLeg_: apply=true weight=1
      IKMarkerTask Ankle_Lateral_l: apply=true weight=1
      IKMarkerTask LTIB: apply=true weight=1
      IKMarkerTask LTOE: apply=true weight=1
      IKMarkerTask LHEE: apply=true weight=1
