# OpenSim document version 40500
InverseKinematicsTool:
  time_range: 0 9.05833
  output_motion_file: C:\Users\Maksim\Documents\GitHub\OpenSim_test\Dari_squat_02_ik.mot
  marker_file: DARI_DATA/Captury_Subj1_squat02.trc
  IKTaskSet:
    IKMarkerTask Spine4_: apply=true weight=1
    IKMarkerTask Spine_: apply=true weight=1
    IKMarkerTask RightArm_: apply=true weight=1
    IKMarkerTask LeftArm_: apply=true weight=1
    IKMarkerTask RASI: apply=true weight=1
    IKMarkerTask LASI: apply=true weight=1
    IKMarkerTask RIPS: apply=true weight=1
    IKMarkerTask LIPS: apply=true weight=1
    IKMarkerTask RightUpLeg_: apply=true weight=1
    IKMarkerTask LeftUpLeg_: apply=true weight=1
    IKMarkerTask RTHI: apply=true weight=1
    IKMarkerTask Knee_Lateral_r: apply=true weight=1
    IKMarkerTask RightLeg_: apply=true weight=1
    IKMarkerTask RTIB: apply=true weight=1
    IKMarkerTask Ankle_Lateral_r: apply=true weight=1
    IKMarkerTask RTOE: apply=true weight=1
    IKMarkerTask RHEE: apply=true weight=1
    IKMarkerTask LTHI: apply=true weight=1
    IKMarkerTask Knee_Lateral_l: apply=true weight=1
    IKMarkerTask LeftLeg_: apply=true weight=1
    IKMarkerTask Ankle_Lateral_l: apply=true weight=1
    IKMarkerTask LTIB: apply=true weight=1
    IKMarkerTask LTOE: apply=true weight=1
    IKMarkerTask LHEE: apply=true weight=1
