# OpenSim document version 40500
InverseKinematicsTool:
  time_range: 0 9.05833
  output_motion_file: C:\Users\Maksim\Documents\GitHub\OpenSim_test\subject01_walk1_ik.mot
  marker_file: HSS_squat1.trc
  IKTaskSet:
    IKMarkerTask R.Shoulder: apply=true weight=1
    IKMarkerTask L.Shoulder: apply=true weight=1
    IKMarkerTask V.Sacral: apply=true weight=1
    IKMarkerTask L.PSIS: apply=true weight=1
    IKMarkerTask R.Hip: apply=true weight=1
    IKMarkerTask L.Hip: apply=true weight=1
    IKMarkerTask R.Knee.Lateral: apply=true weight=1
    IKMarkerTask R.Thigh.Front: apply=true weight=1
    IKMarkerTask R.Shank.Front: apply=true weight=1
    IKMarkerTask R.Ankle.Lateral: apply=true weight=1
    IKMarkerTask R.Toe: apply=true weight=1
    IKMarkerTask R.Heel: apply=true weight=1
    IKMarkerTask L.Knee.Lateral: apply=true weight=1
    IKMarkerTask L.Thigh.Front: apply=true weight=1
    IKMarkerTask L.Ankle.Lateral: apply=true weight=1
    IKMarkerTask L.Shank.Front: apply=true weight=1
    IKMarkerTask L.Toe: apply=true weight=1
    IKMarkerTask L.Heel: apply=true weight=1
